<Lems>

<!-- Example with Simple cell specifying segment details-->

    <!-- This is a file which can be read and executed by the LEMS Interpreter.
         It imports the LEMS definitions of the core NeuroML 2 Components,
         imports in "pure" NeuroML 2 and contains some LEMS elements for running
         a simulation -->

    <Target component="sim1"/>

    <Include file="Cells.xml"/>
    <Include file="Networks.xml"/>
    <Include file="Simulation.xml"/>

    <!-- Including file with a <neuroml> root, a "real" NeuroML 2 file -->
    <Include file="tester_2_jrose_cell_3L.nml"/>

    <Simulation id="sim1" length="300ms" step="0.01ms" target="network_1">

        <Display id="d1" title="Voltage" timeScale="1ms" xmin="0" xmax="300" ymin="-90" ymax="50">
                <Line id="v" quantity="hhpop[0]/v" scale="1mV" color="#ffffff" timeScale="1ms"/>
                <Line id="spiking" quantity="hhpop[0]/spiking" scale="0.1V"  color="#004040" timeScale="1ms"/>
                <!--<Line id="l3" quantity="hhpop[0]/debugVal" scale="1V"  color="#999999" timeScale="1ms"/>-->
        </Display>
        <Display id="d2" title="Rate Variables" timeScale="1ms" xmin="0" xmax="300" ymin="-0.1" ymax="1.1">
                <Line id="m" quantity="hhpop[0]/bioPhys1/membraneProperties/naChans/naChan/m/q" scale="1"  color="#000000" timeScale="1ms"/>
                <Line id="h" quantity="hhpop[0]/bioPhys1/membraneProperties/naChans/naChan/h/q" scale="1"  color="#ff0000" timeScale="1ms"/>
                <Line id="n" quantity="hhpop[0]/bioPhys1/membraneProperties/kChans/kChan/n/q" scale="1"  color="#0000ff" timeScale="1ms"/>
        </Display>
        <Display id="d3" title="Current Densities" timeScale="1ms" xmin="0" xmax="300" ymin="-0.1" ymax="1.1">
                <Line id="ina" quantity="hhpop[0]/bioPhys1/membraneProperties/naChans/iDensity" scale="1"  color="#000000" timeScale="1ms"/>
                <Line id="ik" quantity="hhpop[0]/bioPhys1/membraneProperties/kChans/iDensity" scale="1"  color="#ff0000" timeScale="1ms"/>
        </Display>
        <Display id="d4" title="Conductance Densities" timeScale="1ms" xmin="0" xmax="300" ymin="-50" ymax="350">
                <Line id="gna" quantity="hhpop[0]/bioPhys1/membraneProperties/naChans/gDensity" scale="1"  color="#000000" timeScale="1ms"/>
                <Line id="gk" quantity="hhpop[0]/bioPhys1/membraneProperties/kChans/gDensity" scale="1"  color="#ff0000" timeScale="1ms"/>
        </Display>

        <OutputFile id="of0" fileName="results/ex5_v.dat">
            <OutputColumn id="v" quantity="hhpop[0]/v"/>
        </OutputFile>

        <OutputFile id="of1" fileName="results/ex5_vars.dat">
            <OutputColumn id="m" quantity="hhpop[0]/bioPhys1/membraneProperties/naChans/naChan/m/q"/>
            <OutputColumn id="h" quantity="hhpop[0]/bioPhys1/membraneProperties/naChans/naChan/h/q"/>
            <OutputColumn id="n" quantity="hhpop[0]/bioPhys1/membraneProperties/kChans/kChan/n/q"/>
        </OutputFile>
    </Simulation>

	<!-- Old Stuff -->
    <!--Target component="simulation_2"/-->

    <!--Include file="Cells.xml"/>
    <Include file="Networks.xml"/>
    <Include file="Simulation.xml"/>

	<Include file="../NML/tester_2_jrose_cell_3L.nml"/>

    <Simulation id="simulation_2" length="300ms" step="0.001ms" target="network_1">

        <Display id="display_1" title="Membrane Potential" timeScale="1ms" xmin="0" xmax="530" ymin="-55" ymax="5">
                <Line id="v" quantity="hhpop[0]/v" scale="1mV" color="#ffffff" timeScale="1ms"/>
        </Display>

        <Display id="display_2" title="Na Gates" timeScale="1ms" xmin="0" xmax="530" ymin="0" ymax="1">
                <Line id="m" quantity="hhpop[0]/bio_phys/membraneProperties/na_chan_den/na_channel/m/q" scale="1"  color="#000000" timeScale="1ms"/>
                <Line id="h" quantity="hhpop[0]/bio_phys/membraneProperties/na_chan_den/na_channel/h/q" scale="1"  color="#ff0000" timeScale="1ms"/>
        </Display-->

        <!--OutputFile id="of0" fileName="results/tester_3_results.dat">
            <OutputColumn id="v" quantity="hhpop[0]/v"/>
        </OutputFile-->

        <!--OutputFile id="of1" fileName="results/tester_3_results.dat">
            <OutputColumn id="m" quantity="hhpop[0]/na_pop/ionChannel/m/q"/>
            <OutputColumn id="h" quantity="hhpop[0]/na_pop/ionChannel/h/q"/>
        </OutputFile-->

    <!--/Simulation-->

</Lems>
