<?xml version="1.0" encoding="UTF-8"?>

<neuroml xmlns="http://www.neuroml.org/schema/neuroml2"
	xmlns:xsi="http://www.w3.org/2001/XMLSchema-instance"
	xsi:schemaLocation="http://www.neuroml.org/schema/neuroml2 https://raw.github.com/NeuroML/NeuroML2/master/Schemas/NeuroML2/NeuroML_v2beta4.xsd"
	id="ca_slow_channel">

	<!-- Values from the Genesis file "HNChan.g"
			//make CaS
function make_CaS_ron
    str chanpath = "CaS_ron"
    if ({exists {chanpath}})
        return
    end

    create  tabchannel  {chanpath}
    setfield  {chanpath}  \
         Ek     {ECaS}    \
         Gbar   {3e-9}    \
         Ik     0         \
         Gk     0         \
		 Xpower	2 \
		 Ypower	1 \
		 Zpower	0

    call    {chanpath}    TABCREATE X 100 -0.100 0.050
                             // .005 .134
    FillTableTau {chanpath} X_A .005 .134 -400 {CaSshft1}  -.0487
    FillTableInf {chanpath} X_B  0     1  -420 {CaSshft1} -.0472
		/* Setting the calc_mode to NO_INTERP for speed */
		setfield {chanpath} X_A->calc_mode 0 X_B->calc_mode 0

		/* tweaking the tables for the tabchan calculation */
		tweaktau {chanpath} X

		/* Filling the tables using B-SPLINE interpolation */
		call {chanpath} TABFILL X 3000 0

 call    {chanpath}    TABCREATE Y 100 -0.100 0.050
                           //.200
 FillTableTau {chanpath} Y_A .200 5.250 -250 {CaSshft2} -.043
                                               // -.0512
 FillTableInf {chanpath} Y_B 0 1  360 {CaSshft2} -.055

		/* Setting the calc_mode to NO_INTERP for speed */
		setfield {chanpath} Y_A->calc_mode 0 Y_B->calc_mode 0

		/* tweaking the tables for the tabchan calculation */
		tweaktau {chanpath} Y

		/* Filling the tables using B-SPLINE interpolation */
		call {chanpath} TABFILL Y 3000 0
end

Equations below are from the paper:
A Model of a Segmental Oscillator in the Leech Heartbeat Neuronal Network
A.A.V. HILL, J. LU, M.A. MASINO, O.H. OLSEN, R.L. CALABRESE
Biology Department, 1510 Clifton Road, Emory University, Atlanta, GA 30322
ahill@biology.emory.edu
Received May 17, 2000; Revised November 17, 2000; Accepted December 5, 2000

Overall Current (I) for Ca slow channel = ḡCaS  m^2CaS  hCaS (V−ECaS)

 change in activation gate = dmCaS/dt = steady state: f∞(−420, 0.0472, V ) − mCaS/ time course: τ (−400, 0.0487, 0.005, 0.134, V )
 change in inactivation gate = hCaS/dt =  steady state:  f∞(360, 0.055, V ) − hCaS  / time course: τ (−250, 0.043, 0.2, 5.25, V )

f∞(a, b, V ) = 1 / 1 + exp(a(V +b))
Parameters for steady state for m and h:
"rate" = 1
"midpoint" = -b
"scale" = -1/a

τ(a, b, c, d, V) = c + d / 1 + exp(a(V+b)) : This value will come from "sigmoid.offset.xml" file
Parameters for time course (τ):
"offset" = c
"rate" = d
"midpoint" = -b
"scale" = -1/a
-->

<include href="sigmoid.offset.xml"/>

 <ionChannelHH id="ca_slow_channel" conductance="100nS" species="ca">

        	<gateHHtauInf id="m" instances="2">
            		<steadyState type="HHSigmoidVariable" rate="1" midpoint="-47.20mV" scale="2.380952mV" />
            		<timeCourse type="sigmoidOffsetTimeCourse" offset="0.005ms" rate="0.134ms" midpoint="-48.70mV" scale="2.50mV" />
       		</gateHHtauInf>

       		<gateHHtauInf id="h" instances="1">
            		<steadyState type="HHSigmoidVariable" rate="1" midpoint="-55.00mV" scale="-2.777777mV" />
            		<timeCourse type="sigmoidOffsetTimeCourse" offset="0.2ms" rate="5.25ms" midpoint="-43.00mV"
            			scale="4.00mV" />
       		</gateHHtauInf>

		</ionChannelHH>

	</neuroml>
