<Lems>
	<!--
	Custom componenet for the sigmoidal offset.
	This file is representative of the equation: tau = c + d/ 1 + exp(a(V+b))
	Reference file ==> https://github.com/cengique/drosophila-aCC-L3-motoneuron-model/tree/master/NeuroML2/isopotential_NeuroML2

			 τ(a, b, c, d, V) = c + d / 1 + exp(a(V + b))
			 Parameters for time course:
			"offset" = c
			"rate" = d
			"midpoint" = b
			"scale" = 1/a
		-->

	 <ComponentType name="sigmoidOffsetTimeCourse"
        extends="baseVoltageDepTime"
        description="Voltage-dependent time constant that has a sigmoid shape and an offset">

        <Parameter name="offset" dimension="time" />
        <Parameter name="rate" dimension="time" />
        <Parameter name="midpoint" dimension="voltage" />
        <Parameter name="scale" dimension="voltage" />

        <Dynamics>
            <DerivedVariable name="t" exposure="t" value="offset + rate / (1 + exp(-(v - midpoint)/scale))" />
        </Dynamics>

    </ComponentType>

</Lems>
