<Lems>
  <!-- This is the main file to run the simulation -->
  <Target component="hn1_simulation"/>

  <Include file="Cells.xml"/>
  <Include file="Networks.xml"/>
  <Include file="Simulation.xml"/>
  <Include file="NeuroML2/network.iso.cell34.nml"/>

  <Simulation id="hn1_simulation" length="300ms" step="0.01ms" target="net_1">

    <Display id="display_I" title="Membrane Currents - HN(4L)" timeScale="1ms"
	     xmin="0" xmax="3000" ymin="-60" ymax="60">
      <Line id="na" quantity="hn3L_pop[0]/bio_phys_HN34/membraneProperties/na_chan_den/iDensity" scale="-0.2e-1 m2" color="#ffffff" timeScale="1ms" value = ""/>
      <Line id="k1" quantity="hn3L_pop[0]/bio_phys_HN34/membraneProperties/k1_chan_den/iDensity" scale="-0.2e-1 m2" color="#ff00ff" timeScale="1ms" value = ""/>
      <Line id="k2" quantity="hn3L_pop[0]/bio_phys_HN34/membraneProperties/k2_chan_den/iDensity" scale="-0.2e-1 m2" color="#FFFF00" timeScale="1ms" value = ""/>
      <Line id="ka" quantity="hn3L_pop[0]/bio_phys_HN34/membraneProperties/ka_chan_den/iDensity" scale="-0.2e-1 m2" color="#00ff0ef" timeScale="1ms" value = ""/>
      <Line id="h" quantity="hn3L_pop[0]/bio_phys_HN34/membraneProperties/h_chan_den/iDensity" scale="-0.2e-1 m2" color="#00FF0eF" timeScale="1ms" value = ""/>
      <Line id="caf" quantity="hn3L_pop[0]/bio_phys_HN34/membraneProperties/caf_chan_den/iDensity" scale="-0.2e-1 m2" color="#ADFF2F" timeScale="1ms" value = ""/>
      <Line id="cas" quantity="hn3L_pop[0]/bio_phys_HN34/membraneProperties/cas_chan_den/iDensity" scale="-0.2e-1 m2" color="#FFA500" timeScale="1ms" value = ""/>
      <Line id="p" quantity="hn3L_pop[0]/bio_phys_HN34/membraneProperties/p_chan_den/iDensity" scale="-0.2e-1 m2" color="#800080" timeScale="1ms" value = ""/>
      <Line id="kf" quantity="hn3L_pop[0]/bio_phys_HN34/membraneProperties/kf_chan_den/iDensity" scale="-0.2e-1 m2" color="#000000" timeScale="1ms" value = ""/>
    </Display>

  </Simulation>

</Lems>
