<Lems>
<!-- This is the main file to run the simulation -->
<Target component="hn8_simulation"/>

    <Include file="Cells.xml"/>
    <Include file="Networks.xml"/>
    <Include file="Simulation.xml"/>

	<Include file="NeuroML2/network.8.cell.nml"/>

    <Simulation id="hn8_simulation" length="3000ms" step="0.01ms" target="net_8">

        <Display id="display_v" title="Membrane Potential" timeScale="1ms" xmin="0" xmax="3000" ymin="-55" ymax="50">
                <Line id="v1L" quantity="hn1L_pop[0]/v" scale="1mV" color="#ffffff" timeScale="1ms"/>
                 <Line id="v4L" quantity="hn4L_pop[0]/v" scale="1mV" color="#FFFF00" timeScale="1ms"/>
        </Display>
        <!--Display id="display_i" title="current" timeScale="1ms" xmin="0" xmax="530" ymin="-55" ymax="50">
                <Line id="i" quantity="hn1L_pop[0]/SynS4L1L/i" scale="1nA" color="#ffffff" timeScale="1ms"/>

        </Display-->

         <!--Display id="display_I" title="Membrane Current" timeScale="1ms" xmin="0" xmax="530" ymin="-60" ymax="60">
                <Line id="na" quantity="hn1L_pop[0]/bio_phys_HN4L/membraneProperties/na_chan_den/iDensity" scale="-1uA_per_cm2" color="#ffffff" timeScale="1ms" value = ""/>
                 <Line id="k1" quantity="hn1L_pop[0]/bio_phys_HN4L/membraneProperties/k1_chan_den/iDensity" scale="-1uA_per_cm2" color="#ff0000ff" timeScale="1ms" value = ""/>
                 <Line id="k2" quantity="hn1L_pop[0]/bio_phys_HN4L/membraneProperties/k2_chan_den/iDensity" scale="-1uA_per_cm2" color="#FFFF00" timeScale="1ms" value = ""/>
                  <Line id="ka" quantity="hn1L_pop[0]/bio_phys_HN4L/membraneProperties/ka_chan_den/iDensity" scale="-1uA_per_cm2" color="#00ff0ef" timeScale="1ms" value = ""/>
                <Line id="h" quantity="hn1L_pop[0]/bio_phys_HN4L/membraneProperties/h_chan_den/iDensity" scale="-1uA_per_cm2" color="#00FF0eF" timeScale="1ms" value = ""/>
                <Line id="caf" quantity="hn1L_pop[0]/bio_phys_HN4L/membraneProperties/caf_chan_den/iDensity" scale="-1uA_per_cm2" color="#ADFF2F" timeScale="1ms" value = ""/>
                <Line id="cas" quantity="hn1L_pop[0]/bio_phys_HN4L/membraneProperties/cas_chan_den/iDensity" scale="-1uA_per_cm2" color="#FFA500" timeScale="1ms" value = ""/>
                <Line id="p" quantity="hn1L_pop[0]/bio_phys_HN4L/membraneProperties/p_chan_den/iDensity" scale="-1uA_per_cm2" color="#800080" timeScale="1ms" value = ""/>
                <Line id="kf" quantity="hn1L_pop[0]/bio_phys_HN4L/membraneProperties/kf_chan_den/iDensity" scale="-1uA_per_cm2" color="#000000" timeScale="1ms" value = ""/>
        </Display-->

        <!--bio_phys_prop_3L/membraneProperties/na_channel_density/na_channel-->
        <!--Display id="display_1" title="Na Gates for HN1L" timeScale="1ms" xmin="0" xmax="530" ymin="-0.1" ymax="1.1">
                <Line id="m" quantity="hn1L_pop[0]/bio_phys/membraneProperties/na_chan_den/na_channel/m/q" scale="1"  color="#000000" timeScale="1ms"/>
                <Line id="h" quantity="hn1L_pop[0]/bio_phys/membraneProperties/na_chan_den/na_channel/h/q" scale="1"  color="#ff0000" timeScale="1ms"/>
        </Display-->

        <!-- Display id="display_2" title="K Fast Gates for HN3L" timeScale="1ms" xmin="0" xmax="530" ymin="-0.1" ymax="1.1">
                <Line id="m" quantity="hn1L_pop[0]/bio_phys/membraneProperties/k1_chan_den/k1_channel/m/q" scale="1"  color="#000000" timeScale="1ms"/>
                <Line id="h" quantity="hn1L_pop[0]/bio_phys/membraneProperties/k1_chan_den/k1_channel/h/q" scale="1"  color="#00FF00" timeScale="1ms"/>
        </Display -->

       <!-- <Display id="display_3" title="Na Gates for HN3L" timeScale="1ms" xmin="0" xmax="530" ymin="0" ymax="1">
                <Line id="m" quantity="hn3L_pop[0]/na_pop_HN3L/na_channel/m/q" scale="1"  color="#0000FF" timeScale="1ms"/>
                <Line id="h" quantity="hn3L_pop[0]/na_pop_HN3L/na_channel/h/q" scale="1"  color="#00FF00" timeScale="1ms"/>
        </Display>

	Display id="display_4" title="K1 Gates for HN3L" timeScale="1ms" xmin="0" xmax="530" ymin="0" ymax="1">
                <Line id="m" quantity="hn3L_pop[0]/k1_pop_HN3L/k1_channel/m/q" scale="1"  color="#f000F0" timeScale="1ms"/>
                <Line id="h" quantity="hn3L_pop[0]/k1_pop_HN3L/k1_channel/h/q" scale="1"  color="#f0000f" timeScale="1ms"/>
        </Display-->

        <!--OutputFile id="of0" fileName="../leech_tutorial_neuroml/Project_Leech/data_results/hn8_results.dat">
            <OutputColumn id="v" quantity="hhpop[0]/v"/>
        </OutputFile-->

        <!--OutputFile fileName="../leech_tutorial_neuroml/Project_Leech/results/hn8_results.dat">
             <OutputColumn id="m" quantity="hn1L_pop[0]/na_pop_HN1L/ionChannel/m/q"/>
            <OutputColumn id="h" quantity="hn1L_pop[0]/na_pop_HN1L/ionChannel/h/q"/>
        </OutputFile-->

    </Simulation>

</Lems>
